*Heading
** Job name: Displacement_5micron Model name: Displacement_5micron
** Generated by: Abaqus/CAE 2017
*Preprint, echo=NO, model=NO, history=NO, contact=NO
**
** PARTS
**
*Part, name=Part-1
*End Part
**
*Part, name=Part-2
*End Part
**
**
** ASSEMBLY
**
*Assembly, name=Assembly
**
*Instance, name=Part-1-1, part=Part-1
*Node
      1,   11.8199997,         12.5,          13.
      2,         12.5,   11.8199997,          13.
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*Element, type=C3D8
  1,  345,  343,   17,   16, 1893, 1891,  478,  479
  2,    3,   33,  307,   34,   52,  596, 1855,  398
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*Nset, nset=grain, generate
     1,  20060,      1
*Elset, elset=grain, generate
     1,  18544,      1
** Section: Grain
*Solid Section, elset=grain, material=Grain
,
*End Instance
**
*Instance, name=Part-2-1, part=Part-2
        12.5,         12.5,          13.
        12.5,         12.5,          13., 13.5000000126881,         12.5,          13., 89.9999992730282
*Node
      1, -9.18485047e-16,           0.,           0.
*Nset, nset=Part-2-1-RefPt_, internal
1,
*Surface, type=REVOLUTION, name=m_Surf-1
START,          10., 7.97417771621505
 LINE, 3.5478536826826, 1.47682895018203
 CIRCL,           0.,           0.,           0.,           5.
*End Instance
**
*Nset, nset=Fix, instance=Part-1-1
     7,     8,     9,    12,    15,   108
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*Elset, elset=Fix, instance=Part-1-1
   871,   872,   873,   874,   875,   876
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*Nset, nset=Load, instance=Part-2-1
 1,
*Nset, nset=top, instance=Part-1-1
     1,     2,     3,    10,    13,    16
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*Nset, nset=_PickedSet69, internal, instance=Part-2-1
 1,
*Elset, elset=_s_Surf-1_S1, internal, instance=Part-1-1
     1,     2,     3,     4,     5,     6
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*Elset, elset=_s_Surf-1_S5, internal, instance=Part-1-1
  4598,  4599,  4600,  4601,  4602,  4603
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*Surface, type=ELEMENT, name=s_Surf-1
_s_Surf-1_S1, S1
_s_Surf-1_S5, S5
** Constraint: Constraint-1
*Rigid Body, ref node=_PickedSet69, analytical surface=Part-2-1.m_Surf-1
*End Assembly
*Amplitude, name=Amp-1
             0.,              0.,            17.5,              1.,            27.5,              1.,             45.,              0.
**
** MATERIALS
**
*Material, name=Grain
*Depvar
    200,
*User Material, constants=4
3.,0.,0.,0.
**
** INTERACTION PROPERTIES
**
*Surface Interaction, name=IntProp-1
1.,
*Friction, slip tolerance=0.005
0.,
*Surface Behavior, penalty=NONLINEAR
**
** BOUNDARY CONDITIONS
**
** Name: Fix Type: Displacement/Rotation
*Boundary
Fix, 1, 1
Fix, 2, 2
Fix, 3, 3
** Name: Fix_Load Type: Displacement/Rotation
*Boundary
Load, 1, 1
Load, 2, 2
Load, 4, 4
Load, 5, 5
Load, 6, 6
**
** INTERACTIONS
**
** Interaction: Int-1
*Contact Pair, interaction=IntProp-1, type=SURFACE TO SURFACE
s_Surf-1, Part-2-1.m_Surf-1
** ----------------------------------------------------------------
**
** STEP: Step-1
**
*Step, name=Step-1, nlgeom=YES, inc=10000000, solver=ITERATIVE
*Static
0.001, 45., 1e-20, 0.5
**
**
*CONTROLS, PARAMETER=TIME INCREMENTATION
35, 50, 9, 50, 28, 5, 12, 45
**
*CONTROLS, PARAMETERS=LINE SEARCH
10
*SOLVER CONTROL
1e-5,200,
**
** BOUNDARY CONDITIONS
**
** Name: Load Type: Displacement/Rotation
*Boundary, amplitude=Amp-1
Load, 3, 3, -0.36
**
** OUTPUT REQUESTS
**
*Restart, write, frequency=0
**
** FIELD OUTPUT: F-Output-1
**
*Output, field, time interval=0.5
*Node Output
CF, COORD, RF, U
*Element Output, directions=YES
LE, PE, PEEQ, PEMAG, S, SDV
*Contact Output
CDISP, CSTRESS
**
** HISTORY OUTPUT: H-Output-1
**
*Output, history, variable=PRESELECT, time interval=0.5
*End Step
