*Heading
** Job name: Job-3 Model name: Model-3
** Generated by: Abaqus/CAE 6.12-3
*Preprint, echo=NO, model=NO, history=NO, contact=NO
**
** PARTS
**
*Part, name=Part-3
*End Part
**
*Part, name=Part-5
*Node
      1,         -0.5,           0.,           0.
      2,           0.,           0.,          0.5
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*Element, type=C3D8
  1,  13,  12, 148, 159, 214, 213, 670, 681
  2,  14,  13, 159, 144, 215, 214, 681, 666
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*Nset, nset=Grain, generate
    1,  5412,     1
*Elset, elset=Grain, generate
    1,  4790,     1
** Section: Grain
*Solid Section, elset=Grain, material=Grain
,
*End Part
**
**
** ASSEMBLY
**
*Assembly, name=Assembly
**
*Instance, name=Part-3-1, part=Part-3
*Node
      1, -3.67394029e-16,           0.,           0.
*Nset, nset=Part-3-1-RefPt_, internal
1,
*Surface, type=REVOLUTION, name=m_Surf-2
START, 6.92820323027351,          10.
 LINE, 1.73205080756888,           1.
 CIRCL,           0.,           0.,           0.,           2.
*Rigid Body, ref node=Part-3-1-RefPt_, analytical surface=m_Surf-2
*End Instance
**
*Instance, name=Part-5-1, part=Part-5
*End Instance
**
*Nset, nset=Bottom, instance=Part-5-1
    4,    5,    6,    8,   10,   53
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*Elset, elset=Bottom, instance=Part-5-1
  217,  218,  219,  220,  221,  222
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*Nset, nset=Side, instance=Part-5-1
 4402, 4404, 4407, 4408, 4409, 4410
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*Elset, elset=Side, instance=Part-5-1
 3832, 3840, 3842, 3851, 3853, 3854
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*Nset, nset=Reference_point, instance=Part-3-1
 1,
*Elset, elset=_s_Surf-2_S1, internal, instance=Part-5-1
    1,    2,    3,    4,    5,    6
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*Elset, elset=_s_Surf-2_S2, internal, instance=Part-5-1
 2391, 2392, 2393, 2394, 2395, 2396
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*Surface, type=ELEMENT, name=s_Surf-2
_s_Surf-2_S1, S1
_s_Surf-2_S2, S2
*End Assembly
*Amplitude, name=Amp-1
             0.,              0.,             2.5,              1.,              5.,              0.
**
** MATERIALS
**
*Material, name=Grain
*Depvar
    200,
*User Material, constants=4
3.,-45.,0.,0.
**
** INTERACTION PROPERTIES
**
*Surface Interaction, name=IntProp-1
1.,
*Friction
0.,
*Surface Behavior, penalty
**
** BOUNDARY CONDITIONS
**
** Name: Fix_Bottom Type: Displacement/Rotation
*Boundary
Bottom, 1, 1
Bottom, 2, 2
Bottom, 3, 3
** Name: Fix_indenter Type: Displacement/Rotation
*Boundary
Reference_point, 1, 1
Reference_point, 3, 3
Reference_point, 4, 4
Reference_point, 5, 5
Reference_point, 6, 6
** Name: Fix_side Type: Displacement/Rotation
*Boundary
Side, 1, 1
Side, 3, 3
**
** INTERACTIONS
**
** Interaction: Int-1
*Contact Pair, interaction=IntProp-1, type=SURFACE TO SURFACE
s_Surf-2, Part-3-1.m_Surf-2
** ----------------------------------------------------------------
**
** STEP: Step-1
**
*Step, name=Step-1, nlgeom=YES, inc=1000000, solver=ITERATIVE
*Static
0.001, 5., 1e-20, 0.05
**
**
*CONTROLS, PARAMETER=TIME INCREMENTATION
35, 50, 9, 50, 28, 5, 12, 45
**
*CONTROLS, PARAMETERS=LINE SEARCH
10
*SOLVER CONTROL
1e-5,200,
**
** BOUNDARY CONDITIONS
**
** Name: load Type: Displacement/Rotation
*Boundary, amplitude=Amp-1
Reference_point, 2, 2, -0.5
**
** OUTPUT REQUESTS
**
*Restart, write, frequency=0
**
** FIELD OUTPUT: F-Output-1
**
*Output, field, time interval=0.25
*Node Output
CF, RF, U
*Element Output, directions=YES
LE, PE, PEEQ, PEMAG, S, SDV
*Contact Output
CDISP, CSTRESS
**
** HISTORY OUTPUT: H-Output-1
**
*Output, history, variable=PRESELECT, time interval=0.25
*End Step
