*Heading
** Job name: Job-1 Model name: Model-1
** Generated by: Abaqus/CAE 6.14-2
*Preprint, echo=NO, model=NO, history=NO, contact=NO
**
** PARTS
**
*Part, name=Part
*End Part
**
**
** ASSEMBLY
**
*Assembly, name=Assembly
**
*Instance, name=Part-1, part=Part
*Node
      1,         -10.,          10.,          20.
      2,         -10.,         -10.,          20.
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*Element, type=C3D8
 1,  34,  73, 101,  69,   1,  17,  61,  24
 2,  73,  74, 102, 101,  17,  18,  62,  61
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*Nset, nset=G1-Set2
   1,   2,   3,   4,   5,   6
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*Elset, elset=G1-Set2, generate
  1,  18,   1
*Nset, nset=G2-Set2
   1,   2,   3,   4,   9,  10
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*Elset, elset=G2-Set2, generate
 19,  36,   1
*Nset, nset=G3-Set2
   9,  10,  11,  12,  13,  14
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*Elset, elset=G3-Set2, generate
 37,  54,   1
** Section: Section-1
*Solid Section, elset=G1-Set2, material=Material-1
,
** Section: Section-2
*Solid Section, elset=G2-Set2, material=Material-2
,
** Section: Section-3
*Solid Section, elset=G3-Set2, material=Material-3
,
*End Instance
**
*Nset, nset=Set-1, instance=Part-1
  5,  6,  7,  8, 25, 26, 27, 28, 29, 30, 31, 32, 65, 66, 67, 68
*Elset, elset=Set-1, instance=Part-1, generate
 10,  18,   1
*Nset, nset=Set-2, instance=Part-1
  6,  7, 29, 30
*Elset, elset=Set-2, instance=Part-1, generate
 16,  18,   1
*Nset, nset=Set-3, instance=Part-1
  5,  6, 27, 28
*Elset, elset=Set-3, instance=Part-1, generate
 12,  18,   3
*Nset, nset=Set-4, instance=Part-1
 13, 14, 15, 16, 49, 50, 51, 52, 53, 54, 55, 56, 89, 90, 91, 92
*Elset, elset=Set-4, instance=Part-1, generate
 37,  45,   1
*End Assembly
**
** MATERIALS
**
*Material, name=Material-1
*Depvar
    200,
*User Material, constants=4
3.,0.,0.,0.
*Material, name=Material-2
*Depvar
    200,
*User Material, constants=4
3., 0.74,   0.,   0.
*Material, name=Material-3
*Depvar
    200,
*User Material, constants=4
3., 0.74, 0.58,   0.
**
** BOUNDARY CONDITIONS
**
** Name: BC-1 Type: Displacement/Rotation
*Boundary
Set-1, 1, 1
** Name: BC-2 Type: Displacement/Rotation
*Boundary
Set-3, 2, 2
** Name: BC-3 Type: Displacement/Rotation
*Boundary
Set-2, 3, 3
** ----------------------------------------------------------------
**
** STEP: Step-1
**
*Step, name=Step-1, nlgeom=YES, inc=10000
*Static
0.01, 1., 1e-05, 0.1
**
** BOUNDARY CONDITIONS
**
** Name: BC-4 Type: Displacement/Rotation
*Boundary
Set-4, 1, 1, 3.
**
** OUTPUT REQUESTS
**
*Restart, write, frequency=0
**
** FIELD OUTPUT: F-Output-1
**
*Output, field
*Node Output
RF, U
*Element Output, directions=YES
E, LE, S, SDV
**
** HISTORY OUTPUT: H-Output-1
**
*Output, history, variable=PRESELECT
*End Step
