*Heading
** Job name: Job-1 Model name: TMF-block-x05
** Generated by: Abaqus/CAE 2022
*Preprint, echo=NO, model=NO, history=NO, contact=NO
**
** PARTS
**
*Part, name=BLOCK-1
*Node
      1,         -25.,         -25.,          50.
      2,         -25.,  -8.33333302,          50.
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*Element, type=C3D8
 1, 17, 18, 22, 21,  1,  2,  6,  5
 2, 18, 19, 23, 22,  2,  3,  7,  6
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*Nset, nset=SET-1, generate
  1,  64,   1
*Elset, elset=SET-1, generate
  1,  27,   1
** Section: Section-1-SET-1
*Solid Section, elset=SET-1, material=AUSTENITE-011
,
*End Part
**
**
** ASSEMBLY
**
*Assembly, name=Assembly
**
*Instance, name=BLOCK-1, part=BLOCK-1
*End Instance
**
*Nset, nset=SET-1, instance=BLOCK-1, generate
  1,  61,   4
*Elset, elset=SET-1, instance=BLOCK-1, generate
  1,  25,   3
*Nset, nset=SET-2, instance=BLOCK-1, generate
  1,  49,  16
*Elset, elset=SET-2, instance=BLOCK-1, generate
  1,  19,   9
*Nset, nset=SET-3, instance=BLOCK-1, generate
 49,  61,   4
*Elset, elset=SET-3, instance=BLOCK-1, generate
 19,  25,   3
*Nset, nset=SET-4, instance=BLOCK-1, generate
  4,  64,   4
*Elset, elset=SET-4, instance=BLOCK-1, generate
  3,  27,   3
*Nset, nset=SET-6, instance=BLOCK-1, generate
  1,  64,   1
*Elset, elset=SET-6, instance=BLOCK-1, generate
  1,  27,   1
*End Assembly
*Amplitude, name=AMP-DISP, time=TOTAL TIME
             0.,              0.,              5.,             -1.,             10.,              1.,             20.,             -1.
*Amplitude, name=AMP-TEMP, time=TOTAL TIME
             0.,            923.,              5.,           1023.,             10.,            823.,             20.,           1023.
**
** MATERIALS
**
*Material, name=AUSTENITE-011
*Depvar
    360,
*User Material, constants=30
4., 0.785398,       0.,       0.,       0.,       0.,       0.,       0.
     225.,      49.,  256500.,  111100.,   77200.,      12.,    3e-39,    1250.
     170.,     500.,       0.,       1.,      1.4,       0.,      48.,    5000.
     100.,      10.,  650000.,   49900.,       0.,       0.
**
** BOUNDARY CONDITIONS
**
** Name: Disp-BC-1 Type: Displacement/Rotation
*Boundary
SET-1, 2, 2
** Name: Disp-BC-2 Type: Displacement/Rotation
*Boundary
SET-2, 3, 3
** Name: Disp-BC-3 Type: Displacement/Rotation
*Boundary
SET-3, 1, 1
**
** PREDEFINED FIELDS
**
** Name: Field-1   Type: Temperature
*Initial Conditions, type=TEMPERATURE
SET-6, 923.
** ----------------------------------------------------------------
**
** STEP: Step-1
**
*Step, name=Step-1, nlgeom=YES, inc=1000000, solver=ITERATIVE
*Static
0.001, 20., 1e-15, 0.01
**
** BOUNDARY CONDITIONS
**
** Name: Disp-BC-4 Type: Displacement/Rotation
*Boundary, amplitude=AMP-DISP
SET-4, 2, 2, 0.5
**
** PREDEFINED FIELDS
**
** Name: Field-1   Type: Temperature
*Temperature, op=NEW
** Name: Field-2   Type: Temperature
*Temperature, op=NEW, amplitude=AMP-TEMP
SET-6, 923.
**
** OUTPUT REQUESTS
**
*Restart, write, frequency=0
**
** FIELD OUTPUT: F-Output-1
**
*Output, field, time interval=1.
*Element Output, position=CENTROIDAL, directions=YES
LE, S, SDV, TEMP
**
** FIELD OUTPUT: F-Output-4
**
*Node Output
NT, RF
**
** HISTORY OUTPUT: H-Output-1
**
*Output, history, variable=PRESELECT, time interval=1.
*End Step
