*Heading
** Job name: Job-4 Model name: Model-1
** Generated by: Abaqus/CAE 2022
*Preprint, echo=NO, model=NO, history=NO, contact=NO
**
** PARTS
**
*Part, name=Part-1
*Node
      1,           1.,           1.,           1.
      2,           1.,           0.,           1.
      3,           1.,           1.,           0.
      4,           1.,           0.,           0.
      5,           0.,           1.,           1.
      6,           0.,           0.,           1.
      7,           0.,           1.,           0.
      8,           0.,           0.,           0.
*Element, type=C3D8
1, 5, 6, 8, 7, 1, 2, 4, 3
*Nset, nset=_G4, internal, generate
 1,  8,  1
*Elset, elset=_G4, internal
 1,
*Nset, nset=Rear, generate
 5,  8,  1
*Nset, nset=Side
 3, 4, 7, 8
*Nset, nset=Bot, generate
 2,  8,  2
*Nset, nset=Front, generate
 1,  4,  1
*Nset, nset=Left
 1, 2, 5, 6
*Nset, nset=Top, generate
 1,  7,  2
** Section: Section-1
*Solid Section, elset=_G4, material=Superalloy
,
*End Part
**
**
** ASSEMBLY
**
*Assembly, name=Assembly
**
*Instance, name=Part-1-1, part=Part-1
*End Instance
**
*Nset, nset=Set-1, instance=Part-1-1, generate
 1,  8,  1
*Elset, elset=Set-1, instance=Part-1-1
 1,
*Nset, nset=Set-2, instance=Part-1-1, generate
 1,  8,  1
*Elset, elset=Set-2, instance=Part-1-1
 1,
*End Assembly
*Amplitude, name=Amp-1
             0.,              0.,              1.,             -1.,              2.,              0.,              3.,              1.
             4.,              0.,              5.,             -1.
*Amplitude, name=Amp-2
             0.,              1.,              1.,             1.,              2.,              1.,              3.,              1.
             4.,              1.,              5.,             1.
**
** MATERIALS
**
*Material, name=Aluminum
*Depvar
    200,
*User Material, constants=4
1.,0.,0.,0.
*Material, name=Austenite
*Depvar
    200,
*User Material, constants=4
4.,0.,0.,0.
*Material, name=Copper
*Depvar
    200,
*User Material, constants=4
2.,0.,0.,0.
*Material, name=Ferrite
*Depvar
    200,
*User Material, constants=4
3.,0.,0.,0.
*Material, name=Superalloy
*Depvar
    200,
*User Material, constants=4
5.,0.,0.,0.
**
** BOUNDARY CONDITIONS
**
** Name: BC-Bot Type: Displacement/Rotation
*Boundary
Part-1-1.Bot, 2, 2
** Name: BC-Rear Type: Displacement/Rotation
*Boundary
Part-1-1.Rear, 1, 1
** Name: BC-Side Type: Displacement/Rotation
*Boundary
Part-1-1.Side, 3, 3
** ----------------------------------------------------------------
**
** STEP: Step-1
**
*Step, name=Step-1, nlgeom=YES, inc=100000, solver=ITERATIVE
*Static
0.001, 5., 1e-20, 0.01
**
** BOUNDARY CONDITIONS
**
** Name: Load_Y Type: Displacement/Rotation
*Boundary, amplitude=Amp-1
Part-1-1.Top, 2, 2, 0.05
**
** PREDEFINED FIELDS
**
** Name: Predefined Field-1   Type: Temperature
*Temperature, amplitude=Amp-2
Set-2, 1323.
**
** CONTROLS
**
*Controls, reset
*Controls, parameters=time incrementation
35, 50, , 50, 28, 5, , 45, , ,
*Controls, parameters=line search
10, , , ,
**
** SOLVER CONTROLS
**
*Solver Controls, reset
*Solver Controls
1e-05, 200
**
** OUTPUT REQUESTS
**
*Restart, write, frequency=0
**
** FIELD OUTPUT: F-Output-1
**
*Output, field, time interval=0.1
*Node Output
RF, U
*Element Output, directions=YES
LE, S, SDV
**
** HISTORY OUTPUT: H-Output-1
**
*Output, history, variable=PRESELECT, time interval=0.1
*End Step
